# Initial Conditions:
# The diameter of each wire:
d := 0.0641*in
# Number of turns:
N := 600
# The inner radius of the coil:
r_1 := 1.5*in/2 = 0.01905 m
# Calculations:
# According to http://mathworld.wolfram.com/CirclePacking.html the packing density for circles is roughly 0.9, so N turns of wire with a diameter of d should have a total area of:
A := 1/0.9*N*π*(d/2)^2 = 0.00138798 m^2
# If these wires are arranged into a circular bundle, then its radius should be:
r_b := sqrt(A/π) = 0.827527 in
# Thus, the effective radius of our coil (the radius of the center of the bundle) will be:
r_2 := r_1 + r_b = 0.0400692 m
# Our desired magnetic field is
B := 0.3*T
# Thus, our required current is:
I := B*r_2/(μ_0*N)*(4/5)^(-(3/2)) = 22.2811 A
μ_0 = 1.25664e-6 kg*m/(s^2*A^2)
# The resistivity of copper is:
ρ_c := 1.7*10^-8*Ω*m
# So the total resistance of our N turns of wire is:
R := N*ρ_c*2*π*r_2/(π*(d/2)^2) = 1.23344 Ω
# And the voltage and power for each coil are:
V := I*R = 27.4823 V
P := I*V = 612.335 W
